** CalculiX Input File
** Generated by FEA Platform
** Analysis type: Linear Static

*NODE, NSET=ALL_NODES
1, -50.000000, -25.000000, -12.500000
2, -50.000000, -25.000000, 12.500000
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
*ELEMENT, TYPE=C3D10, ELSET=ALL_ELEMENTS
1, 2644, 3497, 3462, 3553, 3832, 3833, 3834, 3835, 3836, 3837
2, 3416, 3600, 3539, 3618, 3838, 3839, 3840, 3841, 3842, 3843
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
*NSET, NSET=FIXED_NODES
1, 3, 5, 7, 18, 19
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
*NSET, NSET=LOAD_NODES
2, 4, 6, 8, 46, 47
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
*MATERIAL, NAME=STEEL
*ELASTIC
210000, 0.3
*DENSITY
7.85e-09

*SOLID SECTION, ELSET=ALL_ELEMENTS, MATERIAL=STEEL

*STEP
*STATIC

** Fixed support - bottom face cannot move
*BOUNDARY
FIXED_NODES, 1, 3, 0.0

** Applied force: -10000 N in Z direction
** Distributed across 1013 nodes
*CLOAD
2, 3, -9.871668
4, 3, -9.871668
6, 3, -9.871668
8, 3, -9.871668
46, 3, -9.871668
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3402, 3, -9.871668

** Output requests
*NODE FILE
U
*EL FILE
S
E

*END STEP
